*Heading
** Job name: l=4MouseDuraMaterLongCut Model name: adultICRMouseLong
** Generated by: Abaqus/CAE 2022
*Preprint, echo=NO, model=NO, history=NO, contact=NO
**
** PARTS
**
*Part, name=duraMater1
*End Part
**
*Part, name=duraMater2
*End Part
**
*Part, name=rigidPart
*End Part
**
**
** ASSEMBLY
**
*Assembly, name=Assembly
**
*Instance, name=duraMaterInstance_1, part=duraMater1
*Node
      1,   1.39392912,           0.,   2.42836595
      2,    1.4020648,   1.49092495,   2.18746758
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*Element, type=C3D4H
    1, 7568, 6230,  327,  160
    2, 7568, 6223, 6230, 3754
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*Nset, nset=xyFace_1
   4,   5,   7,   8, 118, 119
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*Elset, elset=xyFace_1
  3454,  3463,  3471,  3473,  3476,  3528
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*Nset, nset=xzFace_1
   1,   6,   9,  10, 255, 256
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*Elset, elset=xzFace_1
  2015,  5387,  6485,  6494,  6497,  6499
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*Nset, nset=yzFace_1
   5,   6,   8,   9, 148, 149
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*Elset, elset=yzFace_1
     3,   487,  2549,  3764,  3767,  3768
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*Nset, nset=yzCutFace_1
   2,   3,  11,  12,  47,  48
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*Elset, elset=yzCutFace_1
  9853,  9926,  9929, 10525, 10658, 10798
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*Nset, nset=yzCutFaceAbove_1
   3,   4,   7,  12,  73,  74
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*Elset, elset=yzCutFaceAbove_1
   154,  1704,  5226, 12517, 12598, 12726
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*Nset, nset=yzCutFaceBelow_1
   1,   2,  10,  11,  13,  14
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*Elset, elset=yzCutFaceBelow_1
  2665,  2666,  3108,  3110,  3134,  3823
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*Nset, nset=duraMater1, generate
    1,  7601,     1
*Elset, elset=duraMater1, generate
     1,  22130,      1
*Elset, elset=_yzCutSurfaceAbove_1_S2, internal
   154, 12726
*Elset, elset=_yzCutSurfaceAbove_1_S3, internal
  1704,  5226, 12598, 12791, 12898, 12901
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*Elset, elset=_yzCutSurfaceAbove_1_S4, internal
 12517, 14863, 17148, 17244
*Elset, elset=_yzCutSurfaceAbove_1_S1, internal
 12921, 13086
*Surface, type=ELEMENT, name=yzCutSurfaceAbove_1
_yzCutSurfaceAbove_1_S2, S2
_yzCutSurfaceAbove_1_S3, S3
_yzCutSurfaceAbove_1_S4, S4
_yzCutSurfaceAbove_1_S1, S1
*Elset, elset=_yzCutSurfaceBelow_1_S3, internal
  2665,  2666,  3108,  3110,  3823,  7614
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*Elset, elset=_yzCutSurfaceBelow_1_S4, internal
  3134,  8055,  8203,  9632, 10518, 11482, 12126, 14078, 14098, 17455
*Elset, elset=_yzCutSurfaceBelow_1_S1, internal
 11847, 12144, 13561
*Elset, elset=_yzCutSurfaceBelow_1_S2, internal
 17440, 17443
*Surface, type=ELEMENT, name=yzCutSurfaceBelow_1
_yzCutSurfaceBelow_1_S3, S3
_yzCutSurfaceBelow_1_S4, S4
_yzCutSurfaceBelow_1_S2, S2
_yzCutSurfaceBelow_1_S1, S1
*Elset, elset=_yzCutSurface_1_S3, internal
  9853,  9926,  9929, 10525, 10658, 10798
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*Elset, elset=_yzCutSurface_1_S1, internal
 11177, 12636, 12652, 12680, 17301, 17327, 17332
*Elset, elset=_yzCutSurface_1_S2, internal
 11887, 17355
*Elset, elset=_yzCutSurface_1_S4, internal
 12404, 14178
*Surface, type=ELEMENT, name=yzCutSurface_1
_yzCutSurface_1_S3, S3
_yzCutSurface_1_S1, S1
_yzCutSurface_1_S2, S2
_yzCutSurface_1_S4, S4
*Elset, elset=_interiorDuralSurface_1_S4, internal
     7,    13,    14,    19,    20,    27
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*Elset, elset=_interiorDuralSurface_1_S2, internal
    11,    15,    16,    33,    43,    51
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*Elset, elset=_interiorDuralSurface_1_S1, internal
    18,    24,    37,    38,    41,    45
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*Elset, elset=_interiorDuralSurface_1_S3, internal
    87,   164,   175,   200,   211,   319
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*Surface, type=ELEMENT, name=interiorDuralSurface_1
_interiorDuralSurface_1_S4, S4
_interiorDuralSurface_1_S2, S2
_interiorDuralSurface_1_S1, S1
_interiorDuralSurface_1_S3, S3
** Section: duraMater1
*Solid Section, elset=duraMater1, material=duraMater
,
*End Instance
**
*Instance, name=duraMaterInstance_2, part=duraMater2
*Node
      1,   1.39999998,   3.44617558,           0.
      2,   1.39999998,   3.46410155,           0.
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*Element, type=C3D4H
    1, 6872, 5699, 3631,   88
    2, 6872,  429, 5699,   89
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*Nset, nset=xyFace_2
   1,   2,   3,   4,  13,  14
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*Elset, elset=xyFace_2
     5,  3662,  3732,  3854,  3914,  4478
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*Nset, nset=xzFace_2
   3,   4,   9,  11, 294, 295
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*Elset, elset=xzFace_2
     5,  4414,  4437,  4439,  4463,  4470
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*Nset, nset=yzCutFace_2
   6,   7,   8,  10, 243, 244
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*Elset, elset=yzCutFace_2
  4626, 11094, 11347, 11487, 11770, 11874
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*Nset, nset=yzCutFaceAbove_2
   2,   5,   6,   7, 165, 166
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*Elset, elset=yzCutFaceAbove_2
  9637, 10139, 11161, 11432, 11511, 13285
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*Nset, nset=yzCutFaceBelow_2
   8,   9,  10,  12, 265, 266
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*Elset, elset=yzCutFaceBelow_2
   431,   434,  3474,  3477,  3480,  3551
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*Nset, nset=duraMater2, generate
    1,  6873,     1
*Elset, elset=duraMater2, generate
     1,  20112,      1
*Elset, elset=_yzCutSurfaceAbove_2_S3, internal
  9637, 10139, 11161, 11432, 11511, 13285
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*Elset, elset=_yzCutSurfaceAbove_2_S1, internal
 13472, 13967, 14023, 16206
*Elset, elset=_yzCutSurfaceAbove_2_S4, internal
 13720,
*Elset, elset=_yzCutSurfaceAbove_2_S2, internal
 14024, 16030
*Surface, type=ELEMENT, name=yzCutSurfaceAbove_2
_yzCutSurfaceAbove_2_S3, S3
_yzCutSurfaceAbove_2_S1, S1
_yzCutSurfaceAbove_2_S4, S4
_yzCutSurfaceAbove_2_S2, S2
*Elset, elset=_yzCutSurfaceBelow_2_S4, internal
   431,   434,  3558, 11926, 11986, 12090, 12399, 15008, 16648, 16680, 16690, 16743, 16836, 16869, 17046
*Elset, elset=_yzCutSurfaceBelow_2_S1, internal
  3474,  3480, 10210, 12154, 12155, 12166, 12397, 12482, 12637, 12798, 12977, 14605, 16696, 16909, 16924
*Elset, elset=_yzCutSurfaceBelow_2_S3, internal
  3477, 10206, 17097, 17121, 17209
*Elset, elset=_yzCutSurfaceBelow_2_S2, internal
  3551,  3552,  3562, 12153, 12327, 12403
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*Surface, type=ELEMENT, name=yzCutSurfaceBelow_2
_yzCutSurfaceBelow_2_S4, S4
_yzCutSurfaceBelow_2_S1, S1
_yzCutSurfaceBelow_2_S2, S2
_yzCutSurfaceBelow_2_S3, S3
*Elset, elset=_yzCutSurface_2_S4, internal
  4626, 11094, 11347, 11874, 11902, 14580, 14619, 14630, 14667, 14670, 16452, 16619, 17345, 18591
*Elset, elset=_yzCutSurface_2_S3, internal
 11487, 11770, 11880, 11881, 14555, 14615, 14642, 14672
*Elset, elset=_yzCutSurface_2_S2, internal
 14548, 14569, 14626, 14652, 14689, 14709, 16256, 16389, 16399, 16400
*Elset, elset=_yzCutSurface_2_S1, internal
 14599, 14623, 14643, 14651, 14659, 14662, 14665, 14699, 16265, 16471, 16525, 16530, 16598, 16757
*Surface, type=ELEMENT, name=yzCutSurface_2
_yzCutSurface_2_S4, S4
_yzCutSurface_2_S3, S3
_yzCutSurface_2_S2, S2
_yzCutSurface_2_S1, S1
*Elset, elset=_interiorDuralSurface_2_S3, internal
     2,    80,    95,   108,   125,   129
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*Elset, elset=_interiorDuralSurface_2_S1, internal
     5,    12,    18,    34,    35,    61
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*Elset, elset=_interiorDuralSurface_2_S4, internal
     7,    20,    25,    32,    36,    40
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*Elset, elset=_interiorDuralSurface_2_S2, internal
     8,    11,    13,    16,    21,    23
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*Surface, type=ELEMENT, name=interiorDuralSurface_2
_interiorDuralSurface_2_S3, S3
_interiorDuralSurface_2_S1, S1
_interiorDuralSurface_2_S4, S4
_interiorDuralSurface_2_S2, S2
** Section: duraMater2
*Solid Section, elset=duraMater2, material=duraMater
,
*End Instance
**
*Instance, name=rigidInstance, part=rigidPart
*Node
      1,           0.,           0.,   2.78600001
      2,           0.,           0.,   2.77600002
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*Element, type=R3D4
 1,  1,  2,  7, 92
 2, 92,  7,  8, 91
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*Element, type=R3D3
153,  735, 1975,  731
154,  609,  592,  605
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*Node
   3855,   1.96292841, 2.43459795e-16,   1.96292841
*Nset, nset=rigidInstance-RefPt_, internal
3855,
*Elset, elset=_exteriorRigidSurface_SPOS, internal, generate
 2022,  3920,     1
*Surface, type=ELEMENT, name=exteriorRigidSurface
_exteriorRigidSurface_SPOS, SPOS
*Elset, elset=rigidInstance, generate
    1,  3920,     1
*End Instance
**
*Nset, nset=_PickedSet25, internal, instance=rigidInstance
 3855,
*Rigid Body, ref node=rigidInstance.rigidInstance-RefPt_, elset=rigidInstance.rigidInstance
**
**
*********************************************************************
** CONSTRAINTS: Tie between cut plane surfaces
*********************************************************************
**
** Constraint: tie2
*Tie, name=tie2, adjust=yes, type=SURFACE TO SURFACE
duraMaterInstance_2.yzCutSurfaceAbove_2, duraMaterInstance_1.yzCutSurfaceAbove_1
** Constraint: tie3
*Tie, name=tie3, adjust=yes, type=SURFACE TO SURFACE
duraMaterInstance_2.yzCutSurfaceBelow_2, duraMaterInstance_1.yzCutSurfaceBelow_1
*End Assembly
**
**
*********************************************************************
** MATERIAL
*********************************************************************
**
*Material, name=duraMater
*Depvar
    8,
*User Material, constants=7, unsymm
    112.7, 1.127, 2.794, 4.000, 2.794, 1.16, 10
*Initial Conditions, Type=Solution, User
**
**
*********************************************************************
** INTERACTION PROPERTIES
*********************************************************************
**
*Surface Interaction, name=contact
1.,
*Friction, slip tolerance=0.005
 0.25,
*Surface Behavior, penalty=NONLINEAR
**
**
*********************************************************************
** Interactions
*********************************************************************
**
** Interaction: contactWhileDisplacing_1
*Contact Pair, interaction=contact, small sliding, type=SURFACE TO SURFACE
duraMaterInstance_1.interiorDuralSurface_1, rigidInstance.exteriorRigidSurface
** Interaction: contactWhileDisplacing_2
*Contact Pair, interaction=contact, small sliding, type=SURFACE TO SURFACE
duraMaterInstance_2.interiorDuralSurface_2, rigidInstance.exteriorRigidSurface
**
**
*********************************************************************
** STEP
*********************************************************************
**
*********************************************************************
** Step 1: Transversely isotropic mass reduction
*********************************************************************
**
*Step, name=transverselyIsotropicStretching, nlgeom=YES
*Static
0.01, 10., 1e-6, 1.
**
**
*********************************************************************
** Boundary conditions
*********************************************************************
**
** Name: rigidFixedRefPoint Type: Symmetry/Antisymmetry/Encastre
*Boundary
_PickedSet25, ENCASTRE
** Name: xyFaceZFixed_1 Type: Symmetry/Antisymmetry/Encastre
*Boundary
duraMaterInstance_1.xyFace_1, ZSYMM
** Name: xyFaceZFixed_2 Type: Symmetry/Antisymmetry/Encastre
*Boundary
duraMaterInstance_2.xyFace_2, ZSYMM
** Name: xzFaceYFixed_1 Type: Symmetry/Antisymmetry/Encastre
*Boundary
duraMaterInstance_1.xzFace_1, YSYMM
** Name: xzFaceYFixed_2 Type: Symmetry/Antisymmetry/Encastre
*Boundary
duraMaterInstance_2.xzFace_2, YSYMM
** Name: yzFaceXFixed_1 Type: Symmetry/Antisymmetry/Encastre
*Boundary
duraMaterInstance_1.yzFace_1, XSYMM
**
**
*********************************************************************
** Controls
*********************************************************************
**
*Controls, reset
*Controls, analysis=discontinuous
*Controls, parameters=time incrementation
, , 200, 200, 200, 200, 200, 200, 200, 10, 200
*Controls, parameters=line search
10,1.0,0.0001,0.25,0.01
*Controls, parameters=field, field=global
, , , , , , ,
, 1.
**
**
*********************************************************************
** Output requests
*********************************************************************
**
*Restart, write, frequency=0
**
** FIELD OUTPUT: F-Output-1
**
*Output, field, variable=PRESELECT
*Node Output
COORD
**
** FIELD OUTPUT: F-Output-2
*Element Output, directions=YES
SDV
**
** HISTORY OUTPUT: H-Output-1
*Element Output, elset=duraMaterInstance_1.duraMater1
SDV
**
** HISTORY OUTPUT: H-Output-2
*Element Output, elset=duraMaterInstance_2.duraMater2
SDV
**
*End Step
**
**
